<neuroml xmlns="http://www.neuroml.org/schema/neuroml2"  xmlns:xs="http://www.w3.org/2001/XMLSchema" xmlns:xsi="http://www.w3.org/2001/XMLSchema-instance" xsi:schemaLocation="http://www.neuroml.org/schema/neuroml2 https://raw.github.com/NeuroML/NeuroML2/development/Schemas/NeuroML2/NeuroML_v2beta5.xsd" id="Conn1Region">
    <notes>Network from TVB: ??</notes>
    <include href="../TVB_LEMS/defaultModels.xml"/>
    <include href="../TVB_LEMS/jansenrit.lems.xml"/>
    <network id="Conn1Region">
        <notes>Network from TVB: ??</notes>
        <population id="R0" component="jansenritDefault" size="1" type="populationList">
            <property tag="radius" value="5000"/>
            <instance id="0">
                <location x="0." y="0." z="0."/>
            </instance>
        </population>
    </network>
</neuroml>
