<Lems>

    <!-- Specify which component to run -->
    <Target component="sim1" />

    <!-- Include core NeuroML2 ComponentType definitions -->
    <Include file="Cells.xml" />
    <Include file="Networks.xml" />
    <Include file="Simulation.xml" />

    <Include file="G2DO_2.net.nml" />

    <!-- End of NeuroML2 content -->

    <Simulation id="sim1" length="1000ms" step="0.01ms" target="net1">

        <Display id="d1" title="Ex   LEMS" timeScale="1s" xmin="-50" xmax="1050" ymin="-.6" ymax=".1">
            <Line id="V" quantity="Pop1[0]/V" scale="1" color="#e77000" timeScale="1ms" />
            <Line id="W" quantity="Pop1[0]/W" scale="1" color="#ee00FF" timeScale="1ms" />
            <!--
            <Line id="V2" quantity="Pop2[0]/V" scale="1" color="#ee0000" timeScale="1ms" />
            <Line id="W2" quantity="Pop2[0]/W" scale="1" color="#000099" timeScale="1ms" />-->
        </Display>

        <OutputFile id="of1" fileName="results_g2do.dat">
            <OutputColumn id="o0" quantity="Pop1[0]/V"/>
        </OutputFile>

    </Simulation>

</Lems>
