<?xml version="1.0" ?>
<Lems xmlns="http://www.neuroml.org/lems/0.7.6" xmlns:xsi="http://www.w3.org/2001/XMLSchema-instance" xsi:schemaLocation="http://www.neuroml.org/lems/0.7.6 https://raw.githubusercontent.com/LEMS/LEMS/development/Schemas/LEMS/LEMS_v0.7.6.xsd">
  <Dimension name="time" t="1"/>
  <ComponentType description="" extends="baseCellMembPot" name="linear">
    <Parameter dimension="none" name="lam"/>
    <Constant dimension="time" name="MSEC" value="1ms"/>
    <Constant dimension="none" name="PI" value="3.14159265359"/>
    <Attachments name="synapses" type="basePointCurrentDL"/>
    <Exposure dimension="none" name="c"/>
    <Exposure dimension="none" name="x"/>
    <Dynamics>
      <StateVariable dimension="voltage" exposure="v" name="v"/>
      <StateVariable dimension="none" exposure="x" name="x"/>
      <DerivedVariable dimension="none" exposure="c" name="c" reduce="add" select="synapses[*]/I"/>
      <DerivedVariable exposure="x" name="x" value="x"/>
      <TimeDerivative value="(lam * x + c)/MSEC" variable="x"/>
      <OnCondition test="v .gt. 0">
        <EventOut port="spike"/>
      </OnCondition>
    </Dynamics>
  </ComponentType>
</Lems>
