<?xml version="1.0" ?>
<Lems xmlns="http://www.neuroml.org/lems/0.7.6" xmlns:xsi="http://www.w3.org/2001/XMLSchema-instance" xsi:schemaLocation="http://www.neuroml.org/lems/0.7.6 https://raw.githubusercontent.com/LEMS/LEMS/development/Schemas/LEMS/LEMS_v0.7.6.xsd">
  <Dimension name="time" t="1"/>
  <ComponentType description="" extends="baseCellMembPot" name="rww">
    <Parameter dimension="none" name="a"/>
    <Parameter dimension="none" name="b"/>
    <Parameter dimension="none" name="d"/>
    <Parameter dimension="none" name="g"/>
    <Parameter dimension="none" name="ts"/>
    <Parameter dimension="none" name="J"/>
    <Parameter dimension="none" name="w"/>
    <Parameter dimension="none" name="io"/>
    <Constant dimension="time" name="MSEC" value="1ms"/>
    <Constant dimension="none" name="PI" value="3.14159265359"/>
    <Attachments name="synapses" type="basePointCurrentDL"/>
    <Exposure dimension="none" name="c"/>
    <Exposure dimension="none" name="S"/>
    <Dynamics>
      <StateVariable dimension="voltage" exposure="v" name="v"/>
      <StateVariable dimension="none" exposure="S" name="S"/>
      <DerivedVariable dimension="none" exposure="c" name="c" reduce="add" select="synapses[*]/I"/>
      <DerivedVariable name="x" value="w * J * S + io + J * c"/>
      <DerivedVariable name="h" value="(a * x - b) / (1 - exp(-d*(a*x - b)))"/>
      <DerivedVariable exposure="S" name="S" value="S"/>
      <TimeDerivative value="(- (S / ts) + (1 - S) * h * g)/MSEC" variable="S"/>
      <OnCondition test="v .gt. 0">
        <EventOut port="spike"/>
      </OnCondition>
    </Dynamics>
  </ComponentType>
</Lems>
